# OpenSim document version 30516
InverseKinematicsTool static_walk_1:
  results_directory: /home/idwivedi/PycharmProjects/OpenSimPython/IK/PythonOutput/
  model_file: ../Scale/subject_scaled_run.osim
  constraint_weight: Inf
  accuracy: 0.0001
  marker_file: /home/idwivedi/PycharmProjects/OpenSimPython/ExpData/static_walk_1.trc
  time_range: 0 2.85
  report_errors: true
  output_motion_file: /home/idwivedi/PycharmProjects/OpenSimPython/IK/PythonOutput/static_walk_1.mot
  report_marker_locations: false
  IKTaskSet:
    IKMarkerTask RACR: apply=true weight=25
    IKMarkerTask LACR: apply=true weight=25
    IKMarkerTask C7: apply=true weight=25
    IKMarkerTask CLAV: apply=true weight=25
    IKMarkerTask RASH: apply=false weight=1
    IKMarkerTask RPSH: apply=false weight=1
    IKMarkerTask LASH: apply=false weight=1
    IKMarkerTask LPSH: apply=false weight=1
    IKMarkerTask RSJC: apply=false weight=1
    IKMarkerTask RUA1: apply=true weight=25
    IKMarkerTask RUA2: apply=true weight=25
    IKMarkerTask RUA3: apply=true weight=25
    IKMarkerTask RLEL: apply=true weight=25
    IKMarkerTask RMEL: apply=true weight=25
    IKMarkerTask RFAsuperior: apply=true weight=25
    IKMarkerTask RFAradius: apply=true weight=25
    IKMarkerTask RFAulna: apply=true weight=25
    IKMarkerTask LSJC: apply=false weight=1
    IKMarkerTask LUA1: apply=false weight=25
    IKMarkerTask LUA2: apply=true weight=25
    IKMarkerTask LUA3: apply=true weight=25
    IKMarkerTask LLEL: apply=true weight=25
    IKMarkerTask LMEL: apply=true weight=25
    IKMarkerTask LFAsuperior: apply=true weight=25
    IKMarkerTask LFAradius: apply=true weight=25
    IKMarkerTask LFAulna: apply=true weight=25
    IKMarkerTask RASI: apply=true weight=100
    IKMarkerTask LASI: apply=true weight=100
    IKMarkerTask RPSI: apply=true weight=100
    IKMarkerTask LPSI: apply=true weight=100
    IKMarkerTask LHJC: apply=false weight=1
    IKMarkerTask RHJC: apply=false weight=1
    IKMarkerTask RTH1: apply=true weight=50
    IKMarkerTask RTH2: apply=true weight=50
    IKMarkerTask RTH3: apply=true weight=50
    IKMarkerTask RLFC: apply=false weight=1
    IKMarkerTask RMFC: apply=false weight=1
    IKMarkerTask RKJC: apply=false weight=1
    IKMarkerTask RTB1: apply=true weight=50
    IKMarkerTask RTB2: apply=true weight=50
    IKMarkerTask RTB3: apply=true weight=50
    IKMarkerTask RLMAL: apply=false weight=1
    IKMarkerTask RMMAL: apply=false weight=1
    IKMarkerTask RAJC: apply=false weight=1
    IKMarkerTask RCAL: apply=true weight=50
    IKMarkerTask RTOE: apply=true weight=50
    IKMarkerTask RMT5: apply=true weight=50
    IKMarkerTask LTH1: apply=true weight=50
    IKMarkerTask LTH2: apply=true weight=50
    IKMarkerTask LTH3: apply=true weight=50
    IKMarkerTask LLFC: apply=false weight=1
    IKMarkerTask LMFC: apply=false weight=1
    IKMarkerTask LKJC: apply=false weight=1
    IKMarkerTask LTB1: apply=true weight=50
    IKMarkerTask LTB2: apply=true weight=50
    IKMarkerTask LTB3: apply=true weight=50
    IKMarkerTask LLMAL: apply=false weight=1
    IKMarkerTask LMMAL: apply=false weight=1
    IKMarkerTask LAJC: apply=false weight=1
    IKMarkerTask LCAL: apply=true weight=50
    IKMarkerTask LTOE: apply=true weight=50
    IKMarkerTask LMT5: apply=true weight=50
    IKMarkerTask REJC: apply=false weight=1
    IKMarkerTask LEJC: apply=false weight=1
